<Node name="root" dt="0.04" gravity="0 -9.81 0" >
    <RequiredPlugin name="SofaOpenglVisual"/>
    <RequiredPlugin pluginName='SofaMiscCollision'/>
    <RequiredPlugin pluginName="CImgPlugin"/>
    <VisualStyle displayFlags="hideBehaviorModels hideCollisionModels hideMappings hideForceFields" />
    <BackgroundSetting color="0 0 0" />

    <RequiredPlugin name="Geomagic plugin" pluginName="Geomagic" />
    <GeomagicDriver name="GeomagicDevice" deviceName="Default Device" scale="1" drawDeviceFrame="1" positionBase="0 0 0" drawDevice="1" orientationBase="0 0.707 0 -0.707"  />

    <DefaultPipeline name="pipeline" verbose="0" depth="10" draw="0"/>
    <BruteForceDetection name="detection" />
    <DefaultContactManager name="response" response="FrictionContact" />
    <LocalMinDistance name="proximity" alarmDistance="0.05" contactDistance="0.01"/>
    <DefaultCollisionGroupManager name="Group" />
    <LCPConstraintSolver tolerance="0.001" maxIt="1000"/>
    <FreeMotionAnimationLoop />

    <Node name="CorneaScleraIris" gravity="0 -9.81 0">
        <EulerImplicitSolver name="cg_odesolver" rayleighStiffness="0.1" rayleighMass="0.1"/>
        <CGLinearSolver name="linear solver" iterations="25" tolerance="1e-10" threshold="1e-10" />
        <MeshGmshLoader name="meshLoader" filename="/home/alireza/sofaDirectory/CompleteEye/Stl/CorneaScleraIris.msh" />
        <TetrahedronSetTopologyContainer name="topo" src="@meshLoader" />
        <MechanicalObject name="dofs" src="@meshLoader" />
        <TetrahedronSetGeometryAlgorithms template="Vec3d" name="GeomAlgo" />
        <DiagonalMass  name="computed using mass density" massDensity="1" />
        <TetrahedralCorotationalFEMForceField template="Vec3d" name="FEM" method="large" poissonRatio="0.3" youngModulus="2080000" computeGlobalMatrix="0" />
        <!-- <PrecomputedConstraintCorrection recompute="true"/> -->

        <UncoupledConstraintCorrection />
        <Node name="Visual" tags="Visual">
            <MeshObjLoader name="ObjLoader" filename="/home/alireza/sofaDirectory/CompleteEye/Obj/CorneaScleraIris.obj"/>
            <OglModel   name="VisualModel" src="@ObjLoader"
                        material="Default Diffuse 1 1 1 1 0.5 Ambient 1 0.1 0.1 0.1 1 Specular 0 0.1 0.1 0.1 1 Emissive 0 0.1 0.1 0.1 1 Shininess 0 45"/>
                        <!-- texturename="/home/alireza/sofaDirectory/CompleteEye/Obj/Cornea_WholeVRayDiffuseFilterMap.jpg"/> -->
            <BarycentricMapping name="visual mapping" input="@../dofs" output="@VisualModel" />
        </Node>

        <Node name="Collision" >
            <MeshTopology name="Mesh" src="@../Visual/ObjLoader" />
            <MechanicalObject template="Vec3d" name="CollisionObject" restScale="1" src="@../Visual/ObjLoader"/>
            <PointCollisionModel name="Points" />
            <LineCollisionModel name="Lines" />
            <TriangleCollisionModel template="Vec3d" name="Triangles" />
            <BarycentricMapping  name="MechanicalMapping" input="@../dofs" output="@CollisionObject"/>
        </Node>
    </Node>

    <!-- <Node name="Cornea" gravity="0 -9.81 0">
        <EulerImplicitSolver name="cg_odesolver" rayleighStiffness="0.1" rayleighMass="0.1"/>
        <CGLinearSolver name="linear solver" iterations="25" tolerance="1e-10" threshold="1e-10" />
        <MeshGmshLoader name="meshLoader" filename="/home/alireza/sofaDirectory/CompleteEye/Stl/Cornea.msh" />
        <TetrahedronSetTopologyContainer name="topo" src="@meshLoader" />
        <MechanicalObject name="dofs" src="@meshLoader" />
        <TetrahedronSetGeometryAlgorithms template="Vec3d" name="GeomAlgo" />
        <DiagonalMass  name="computed using mass density" massDensity="1000" />
        <TetrahedralCorotationalFEMForceField template="Vec3d" name="FEM" method="large" poissonRatio="0.3" youngModulus="2080000" computeGlobalMatrix="0" />
        <PrecomputedConstraintCorrection recompute="true"/>

        <UncoupledConstraintCorrection />
        <Node name="Visual" tags="Visual">
            <MeshObjLoader name="ObjLoader" filename="/home/alireza/sofaDirectory/CompleteEye/Obj/BakedCornea.obj"/>
            <OglModel   name="VisualModel" src="@ObjLoader"
                        material="Default Diffuse 1 1 1 1 0.5 Ambient 1 0.1 0.1 0.1 1 Specular 0 0.1 0.1 0.1 1 Emissive 0 0.1 0.1 0.1 1 Shininess 0 45"
                        texturename="/home/alireza/sofaDirectory/CompleteEye/Obj/Cornea_WholeVRayDiffuseFilterMap.jpg"/>
            <BarycentricMapping name="visual mapping" input="@../dofs" output="@VisualModel" />
        </Node>

        <Node name="Collision" >
            <MeshTopology name="Mesh" src="@../Visual/ObjLoader" />
            <MechanicalObject template="Vec3d" name="CollisionObject" restScale="1" src="@../Visual/ObjLoader"/>
            <PointCollisionModel name="Points" />
            <LineCollisionModel name="Lines" />
            <TriangleCollisionModel template="Vec3d" name="Triangles" />
            <BarycentricMapping  name="MechanicalMapping" input="@../dofs" output="@CollisionObject"/>
        </Node>
    </Node> -->

    <!-- <Node name="Ligament" gravity="0 -9.81 0">
        <EulerImplicitSolver name="cg_odesolver" rayleighStiffness="0.1" rayleighMass="0.1"/>
        <CGLinearSolver name="linear solver" iterations="25" tolerance="1e-10" threshold="1e-10" />
        <MeshGmshLoader name="meshLoader" filename="/home/alireza/sofaDirectory/CompleteEye/Stl/Ligament.msh" />
        <TetrahedronSetTopologyContainer name="topo" src="@meshLoader" />
        <MechanicalObject name="dofs" src="@meshLoader" translation="0 -0.4 0"/>
        <TetrahedronSetGeometryAlgorithms template="Vec3d" name="GeomAlgo" />
        <DiagonalMass  name="computed using mass density" massDensity="10" />
        <TetrahedralCorotationalFEMForceField template="Vec3d" name="FEM" method="large" poissonRatio="0.3" youngModulus="2080000" computeGlobalMatrix="0" />

        <Node name="Visual" tags="Visual">
            <MeshObjLoader name="ObjLoader" filename="/home/alireza/sofaDirectory/CompleteEye/Obj/BakedLigament.obj"/>
            <OglModel  name="VisualModel" src="@ObjLoader" translation="0 -0.4 0" texturename="/home/alireza/sofaDirectory/CompleteEye/Obj/ligamentsWholeVRayDiffuseFilterMap.jpg"/>
            <BarycentricMapping name="visual mapping" input="@../dofs" output="@VisualModel" />
        </Node>

        <Node name="Collision" >
            <MeshTopology name="Mesh" src="@../Visual/ObjLoader" />
            <MechanicalObject template="Vec3d" name="CollisionObject" restScale="1" translation="0 -0.4 0" src="@../Visual/ObjLoader"/>
            <PointCollisionModel name="Points" />
            <LineCollisionModel name="Lines" />
            <TriangleCollisionModel template="Vec3d" name="Triangles" />
            <BarycentricMapping  name="MechanicalMapping" input="@../dofs" output="@CollisionObject"/>
        </Node>
    </Node> -->

    <!-- <Node name="Lens" gravity="0 -9.81 0">
        <EulerImplicitSolver name="cg_odesolver" rayleighStiffness="0.1" rayleighMass="0.1"/>
        <CGLinearSolver name="linear solver" iterations="25" tolerance="1e-10" threshold="1e-10" />
        <MeshGmshLoader name="meshLoader" filename="/home/alireza/sofaDirectory/CompleteEye/Stl/Lens.msh" />
        <TetrahedronSetTopologyContainer name="topo" src="@meshLoader" />
        <MechanicalObject name="dofs" src="@meshLoader" translation="0 -0.35 0"/>
        <TetrahedronSetGeometryAlgorithms template="Vec3d" name="GeomAlgo" />
        <DiagonalMass  name="computed using mass density" massDensity="10" />
        <TetrahedralCorotationalFEMForceField template="Vec3d" name="FEM" method="large" poissonRatio="0.3" youngModulus="2080000" computeGlobalMatrix="0" />

        <Node name="Visual" tags="Visual">
            <MeshObjLoader name="ObjLoader" filename="/home/alireza/sofaDirectory/CompleteEye/Obj/BakedLens.obj"/>
            <OglModel   name="VisualModel" src="@ObjLoader" translation="0 -0.35 0"
                        material="Default Diffuse 1 1 1 1 0.3 Ambient 1 0.1 0.1 0.1 1 Specular 0 0.1 0.1 0.1 1 Emissive 0 0.1 0.1 0.1 1 Shininess 0 45"/>
            <BarycentricMapping name="visual mapping" input="@../dofs" output="@VisualModel" />
        </Node>

        <Node name="Collision" >
            <MeshTopology name="Mesh" src="@../Visual/ObjLoader" />
            <MechanicalObject template="Vec3d" name="CollisionObject" restScale="1" translation="0 -0.35 0" src="@../Visual/ObjLoader"/>
            <PointCollisionModel name="Points" />
            <LineCollisionModel name="Lines" />
            <TriangleCollisionModel template="Vec3d" name="Triangles" />
            <BarycentricMapping  name="MechanicalMapping" input="@../dofs" output="@CollisionObject"/>
        </Node>
    </Node> -->

    <!-- <Node name="Sclera" gravity="0 -9.81 0">
        <EulerImplicitSolver name="cg_odesolver" rayleighStiffness="0.1" rayleighMass="0.1"/>
        <CGLinearSolver name="linear solver" iterations="100" tolerance="1e-10" threshold="1e-10" />
        <MeshGmshLoader name="meshLoader" filename="/home/alireza/sofaDirectory/CompleteEye/Stl/Sclera.msh" />
        <TetrahedronSetTopologyContainer name="topo" src="@meshLoader" />
        <MechanicalObject name="dofs" src="@meshLoader" translation="0 -1.67 0"/>
        <TetrahedronSetGeometryAlgorithms template="Vec3d" name="GeomAlgo" />
        <DiagonalMass  name="computed using mass density" massDensity="10" />
        <TetrahedralCorotationalFEMForceField template="Vec3d" name="FEM" method="large" poissonRatio="0.3" youngModulus="2080000" computeGlobalMatrix="0" />

        <Node name="Visual" tags="Visual">
            <MeshObjLoader name="ObjLoader" filename="/home/alireza/sofaDirectory/CompleteEye/Obj/BackedSclera.obj"/>
            <OglModel   name="VisualModel" src="@ObjLoader" translation="0 -1.67 0"
                        texturename="/home/alireza/sofaDirectory/CompleteEye/Obj/Sclera_LeftVRayDiffuseFilterMap.jpg"/>
            <BarycentricMapping name="visual mapping" input="@../dofs" output="@VisualModel" />
        </Node>

        <Node name="Collision" >
            <MeshTopology name="Mesh" src="@../Visual/ObjLoader" />
            <MechanicalObject template="Vec3d" name="CollisionObject" restScale="1" translation="0 -1.67 0"/>
            <PointCollisionModel name="Points" />
            <LineCollisionModel name="Lines" />
            <TriangleCollisionModel template="Vec3d" name="Triangles" />
            <BarycentricMapping  name="MechanicalMapping" input="@../dofs" output="@CollisionObject"/>
        </Node>
    </Node> -->

    <!-- <Node name="Iris" gravity="0 -9.81 0">
        <EulerImplicitSolver name="cg_odesolver" rayleighStiffness="0.1" rayleighMass="0.1"/>
        <CGLinearSolver name="linear solver" iterations="100" tolerance="1e-10" threshold="1e-10" />
        <MeshGmshLoader name="meshLoader" filename="/home/alireza/sofaDirectory/CompleteEye/Stl/Iris.msh" />
        <TetrahedronSetTopologyContainer name="topo" src="@meshLoader" />
        <MechanicalObject name="dofs" src="@meshLoader" translation="0 -0.18 0"/>
        <TetrahedronSetGeometryAlgorithms template="Vec3d" name="GeomAlgo" />
        <DiagonalMass  name="computed using mass density" massDensity="10" />
        <TetrahedralCorotationalFEMForceField template="Vec3d" name="FEM" method="large" poissonRatio="0.3" youngModulus="2080000" computeGlobalMatrix="0" />

        <UncoupledConstraintCorrection />
        <Node name="Visual" tags="Visual">
            <MeshObjLoader name="ObjLoader" filename="/home/alireza/sofaDirectory/CompleteEye/Obj/BakedIris.obj"/>
            <OglModel   name="VisualModel" src="@ObjLoader" translation="0 -0.18 0"
                        texturename="/home/alireza/sofaDirectory/CompleteEye/Obj/Chloroid_leftVRayDiffuseFilterMap.jpg"/>
            <BarycentricMapping name="visual mapping" input="@../dofs" output="@VisualModel" />
        </Node>

        <Node name="Collision" >
            <MeshTopology name="Mesh" src="@../Visual/ObjLoader" />
            <MechanicalObject template="Vec3d" name="CollisionObject" restScale="1" translation="0 -0.18 0"/>
            <PointCollisionModel name="Points" />
            <LineCollisionModel name="Lines" />
            <TriangleCollisionModel template="Vec3d" name="Triangles" />
            <BarycentricMapping  name="MechanicalMapping" input="@../dofs" output="@CollisionObject"/>
        </Node>
    </Node> -->

    <!-- <Node name="Chloroid" gravity="0 -9.81 0">
        <EulerImplicitSolver name="cg_odesolver" rayleighStiffness="0.1" rayleighMass="0.1"/>
        <CGLinearSolver name="linear solver" iterations="100" tolerance="1e-10" threshold="1e-10" />
        <MeshGmshLoader name="meshLoader" filename="/home/alireza/sofaDirectory/CompleteEye/Stl/Chloroid.msh" />
        <TetrahedronSetTopologyContainer name="topo" src="@meshLoader" />
        <MechanicalObject name="dofs" src="@meshLoader" translation="0 -1.17 0"/>
        <TetrahedronSetGeometryAlgorithms template="Vec3d" name="GeomAlgo" />
        <DiagonalMass  name="computed using mass density" massDensity="10" />
        <TetrahedralCorotationalFEMForceField template="Vec3d" name="FEM" method="large" poissonRatio="0.3" youngModulus="2080000" computeGlobalMatrix="0" />

        <Node name="Visual" tags="Visual">
            <MeshObjLoader name="ObjLoader" filename="/home/alireza/sofaDirectory/CompleteEye/Obj/BakedChloroid.obj"/>
            <OglModel   name="VisualModel" src="@ObjLoader" translation="0 -1.17 0"
                        texturename="/home/alireza/sofaDirectory/CompleteEye/Obj/Chloroid_leftVRayDiffuseFilterMap.jpg"/>
            <BarycentricMapping name="visual mapping" input="@../dofs" output="@VisualModel" />
        </Node>

        <Node name="Collision" >
            <MeshTopology name="Mesh" src="@../Visual/ObjLoader" />
            <MechanicalObject template="Vec3d" name="CollisionObject" restScale="1" translation="0 -1.17 0"/>
            <PointCollisionModel name="Points" />
            <LineCollisionModel name="Lines" />
            <TriangleCollisionModel template="Vec3d" name="Triangles" />
            <BarycentricMapping  name="MechanicalMapping" input="@../dofs" output="@CollisionObject"/>
        </Node>
    </Node> -->
</Node>
